OpenVSP model (file version 5), 3 components.
Geometry view with OpenVSP parameter names; values to 6 digits, angles in degrees, lengths in the model's unit.
Overall bounding box: X_Min=-30 X_Len=130 Y_Min=-8.853 Y_Len=17.706 Z_Min=-8.853 Z_Len=17.706

Fuselage "body"
  location (X Y Z) 0 0 0, rotation 0 0 0
  bounding box size 100 6.206 6.206
  Design: Length=100
  cross sections:
    n  XLocPercent  YLocPercent  ZLocPercent  shape
    0  0            0            0            circle Circle_Diameter=6.206
    1  1            0            0            as above

Fuselage "nosecone"
  location (X Y Z) -30 0 0, rotation 0 0 0
  bounding box size 30 6.206 8.25332
  Design: Length=30
  cross sections:
    n  XLocPercent  YLocPercent  ZLocPercent  shape
    0  0            0            0            point
    1  1            0            0            circle Circle_Diameter=6.206

Wing "fins_xy"
  location (X Y Z) 87 3.103 0, rotation 0 0 0
  4 copies around X
  bounding box size 12 17.706 17.706
  totals: TotalSpan=11.5 TotalProjectedSpan=11.5 TotalChord=8.5 TotalArea=97.75 TotalAR=1.35294
  root: chord 12, twist 0, biconvex ThickChord=0.0104167
  sections:
    n  Span  Root_Chord  Tip_Chord  Area    Sweep  Sweep_Location  Dihedral  Twist  Twist_Location  tip airfoil
    1  5.75  12          5          48.875  41     0               0         0      0.25            biconvex ThickChord=0.025
