OpenVSP model (file version 5), 3 components.
Geometry view with OpenVSP parameter names; values to 6 digits, angles in degrees, lengths in the model's unit.
Overall bounding box: X_Min=-30 X_Len=133 Y_Min=-12 Y_Len=24 Z_Min=-12 Z_Len=24

Fuselage "body"
  location (X Y Z) 0 0 0, rotation 0 0 0
  bounding box size 103 8 8
  Design: Length=103
  cross sections:
    n  XLocPercent  YLocPercent  ZLocPercent  shape
    0  0            0            0            circle Circle_Diameter=6.17
    1  0.572816     0            0            as above
    2  0.61165      0            0            circle Circle_Diameter=8
    3  1            0            0            as above

Fuselage "nosecone"
  location (X Y Z) -30 0 0, rotation 0 0 0
  bounding box size 30 6.206 8.25332
  Design: Length=30
  cross sections:
    n  XLocPercent  YLocPercent  ZLocPercent  shape
    0  0            0            0            point
    1  1            0            0            circle Circle_Diameter=6.206

Wing "fins_xy"
  location (X Y Z) 83.5 4 0, rotation 0 0 0
  4 copies around X
  bounding box size 16 24 24
  totals: TotalSpan=16 TotalProjectedSpan=16 TotalChord=12 TotalArea=192 TotalAR=1.33333
  root: chord 16, twist 0, biconvex ThickChord=0.0104167
  sections:
    n  Span  Root_Chord  Tip_Chord  Area  Sweep  Sweep_Location  Dihedral  Twist  Twist_Location  tip airfoil
    1  8     16          8          96    45     0               0         0      0.25            biconvex ThickChord=0.025
